t := 0 .. 10
Γ(λ) := integral(x^(λ - 1)*e^(-x), x = 0 .. ∞)
f(t, α, β) := β^α/Γ(α)*t^(α - 1)*e^(-β*t)
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F(t, α, β) := integral(f(t, α, β), t = 0 .. t)
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M1(α, β) := α/β
M1(1, 1.5) = 0.666667
M1(5, 3) = 1.66667
M1(3.5, 1) = 3.5
M1(7, 2) = 3.5
Дисперсия(2й*центральный*момент)
D2(α, β) := α/β^2
D2(1, 1.5) = 0.444444
D2(5, 3) = 0.555556
D2(3.5, 1) = 3.5
D2(7, 2) = 1.75
n := 10000
i := 1 .. n
a := 0
b := 1
Y1 := runif(n, a, b)
G1(i, j) := root(F(t, 1, 1) - Y1, 0, 10)
X11 := matrix(n, 1, G1)  # error: Не удается распознать этот синтаксис.
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# Среднеквадратичное отклонение
σ(α, β) := sqrt(D1(α, β))
σ(1, 1.5) =  # error: Эта переменная не определена.
σ(5, 3) =  # error
σ(3.5, 1) =  # error
# Коэффициент ассиметрии(3й центральный момент)
μ3(α, β) := 2*α1(α, β)^3 - 3*α1(α, β)*α2(α, β) + α3(α, β)
μ3(1, 1.5) =  # error
μ3(5, 3) =  # error
μ3(3.5, 1) =  # error
S1(α, β) := μ3(α, β)/σ(α, β)^3
S2(α, β) := 2/sqrt(α)
S2(1, 1.5) = 2
S1(1, 1.5) =  # error
S2(5, 3) = 0.894427
S1(5, 3) =  # error
S2(3.5, 1) = 1.06904
S1(3.5, 1) =  # error
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