f(t, α, β) := t^(α - 1)*e^(-t*β)*β^α/Γ(α)
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F(t, α, β) := integral(f(t, α, β), t = 0 .. t)
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# Математическое ожидание
m(α, β) := α/β
m(1, 1) = 1
m(5, 3) = 1.66667
m(6, 5) = 1.2
m(7, 3) = 2.33333
# Дисперсия
D(α, β) := α/β^2
D(1, 1) = 1
D(5, 3) = 0.555556
D(6, 5) = 0.24
D(7, 3) = 0.777778
# Среднеквадратическое отклонение
σ(α, β) := sqrt(D(α, β))
σ(1, 1) = 1
σ(5, 3) = 0.745356
σ(6, 5) = 0.489898
σ(7, 3) = 0.881917
n := 10000
i := 1 .. n
a := 0
b := 1
Y1 := runif(n, a, b)
G1(i, j) := root(F(t, 1, 1) - Y1[i], t, 0, 10)
G3(i, j) := root(F(t, 6, 5) - Y1[i], t, 0, 10)
X11 := matrix(n, 1, G1)
X13 := matrix(n, 1, G3)
X21 := sort(X11)
X23 := sort(X13)
G2(i, j) := root(F(t, 5, 3) - Y1[i], t, 0, 10)
G4(i, j) := root(F(t, 7, 3) - Y1[i], t, 0, 10)
X12 := matrix(n, 1, G2)
X14 := matrix(n, 1, G4)
X22 := sort(X12)
X24 := sort(X14)
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bin := 40
j := 1 .. bin + 1
lower1 := floor(min(X11))
lower2 := floor(min(X12))
lower3 := floor(min(X13))
lower4 := floor(min(X14))
upper1 := ceil(max(X11))
upper2 := ceil(max(X12))
upper3 := ceil(max(X13))
upper4 := ceil(max(X14))
h1 := (upper1 - lower1)/bin
h2 := (upper2 - lower2)/bin
h3 := (upper3 - lower3)/bin
h4 := (upper4 - lower4)/bin
int1[j] := lower1 + h1*j
int2[j] := lower2 + h2*j
int3[j] := lower3 + h3*j
int4[j] := lower4 + h4*j
t1 := hist(int1, X11)/(n*h1)
t2 := hist(int2, X12)/(n*h2)
t3 := hist(int3, X13)/(n*h3)
t4 := hist(int4, X14)/(n*h4)
int1 := int1 + h1/2
int2 := int2 + h2/2
int3 := int3 + h3/2
int4 := int4 + h4/2
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# Математическое ожидание
m1 := sum(X21[i], i = 0 .. n - 1)/n
m2 := sum(X22[i], i = 0 .. n - 1)/n
m3 := sum(X23[i], i = 0 .. n - 1)/n
m4 := sum(X24[i], i = 0 .. n - 1)/n
m1 = 1.02558
m2 = 1.68237
m3 = 1.21012
m4 = 2.35127
Дисперсия
d1 := sum(X21[i]^2, i = 0 .. n - 1)/n - m1^2
d2 := sum(X22[i]^2, i = 0 .. n - 1)/n - m2^2
d1 = 1.06932
d2 = 0.583045
d3 := sum(X23[i]^2, i = 0 .. n - 1)/n - m3^2
d4 := sum(X24[i]^2, i = 0 .. n - 1)/n - m4^2
d3 = 0.251569
d4 = 0.814511
# Среднеквадратическое отклонение
sigma1 := sqrt(d1) = 1.03408
sigma2 := sqrt(d2) = 0.763574
sigma3 := sqrt(d3) = 0.501566
sigma4 := sqrt(d4) = 0.902503
# Сравнение результатов:
m(1, 1) = 1
m1 = 1.02558
m(5, 3) = 1.66667
m2 = 1.68237
m(6, 5) = 1.2
m3 = 1.21012
m(7, 3) = 2.33333
m4 = 2.35127
D(1, 1) = 1
d1 = 1.06932
D(5, 3) = 0.555556
d2 = 0.583045
D(6, 5) = 0.24
d3 = 0.251569
D(7, 3) = 0.777778
d4 = 0.814511
σ(1, 1) = 1
sigma1 = 1.03408
σ(5, 3) = 0.745356
sigma2 = 0.763574
σ(6, 5) = 0.489898
sigma3 = 0.501566
σ(7, 3) = 0.881917
sigma4 = 0.902503
