f(t, α, β) := t^(α - 1)*e^(-t*β)*β^α/Γ(α)
F(t, α, β) := integral(f(t, α, β), t = 0 .. t)
N0 := 10000
a1 := 0
b1 := 1
h := 0.05
Y1 := runif(N0, a1, b1)
G1(i, j) := root(F(t, 1, 1) - Y1[i], t, 0, 10)
G2(i, j) := root(F(t, 0.2, 5) - Y1[i], t, 0, 10)
G3(i, j) := root(F(t, 12, 4) - Y1[i], t, 0, 10)
X11 := matrix(N0, 1, G1)
X12 := matrix(N0, 1, G2)
X13 := matrix(N0, 1, G3)
X21 := sort(X11)
X22 := sort(X12)
X23 := sort(X13)
N2(t) :=
    i ← 0
    while t > X22[i]
        i ← i + 1
    N0 - i
N1(t) :=
    i ← 0
    while t > X21[i]
        i ← i + 1
    N0 - i
N3(t) :=
    i ← 0
    while t > X23[i]
        i ← i + 1
    N0 - i
T1max := round(max(X21)/h) = 184
T2max := round(max(X22)/h) = 24
T3max := round(max(X23)/h) = 146
i1 := 0 .. T1max
i2 := 0 .. T2max
i3 := 0 .. T3max
T[i1] := i1*h
T[i2] := i2*h
T[i3] := i3*h
i3 := 0 .. T3max - 1
i1 := 0 .. T1max - 1
i2 := 0 .. T2max - 1
P1[i1] := N1(T[i1])/N0
P1[T1max] := 0
P2[i2] := N2(T[i2])/N0
P2[T2max] := 0
P(t, α, β) := 1 - F(t, α, β)
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P3[i3] := N3(T[i3])/N0
P3[T3max] := 0
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Q1[i1] := (N0 - N1(T[i1]))/N0
Q2[i2] := (N0 - N2(T[i2]))/N0
Q(t, α, β) := F(t, α, β)
Q3[i3] := (N0 - N3(T[i3]))/N0
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i1 := 0 .. T1max - 2
i2 := 0 .. T2max - 2
i3 := 0 .. T3max - 2
f1[i1] := (N1(T[i1]) - N1(T[i1] + h))/(N0*h)
f2[i2] := (N2(T[i2]) + N2(T[i2] + h))/(N0*h)
f3[i3] := (N3(T[i3]) + N3(T[i3] + h))/(N0*h)
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λ1[i1] := (N1(T[i1]) - N1(T[i1] + h))/(N1(T[i1])*h)
λ2[i2] := (N2(T[i2]) - N2(T[i2] + h))/(N2(T[i2])*h)
λ3[i3] := (N3(T[i3]) - N3(T[i3] + h))/(N3(T[i3])*h)
λ(t, α, β) := f(t, α, β)/P(t, α, β)
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