ORIGIN := 1
n := 16
t := rexp(n, 0.07)
t := sort(t)
t = [0.165115; 2.78566; 4.88275; 7.25557; 7.65904; 9.0249; 14.9849; 17.011; 23.477; 24.9708; 25.6324; 27.3599; 30.3995; 34.177; 67.4166; 95.2855]
Ksw := 0.0016
E0 := 16
Given
sum((1/Ksw) - (E0 - i + 1)*t[i]^2/2, i = 1 .. n) == 0
sum((1/(E0 - i + 1)) - Ksw*t[i]^2/2, i = 1 .. n) == 0
[K1sw; E01] := Find(Ksw, E0) = [0.000953659; 15.1669]
Интенсивность
i := 1 .. n
λ[i] := K1sw*(E01 - i + 1)*t[i]
λ = [0.00238823; 0.0376353; 0.0613113; 0.0841866; 0.0815641; 0.087503; 0.130999; 0.132489; 0.16046; 0.146856; 0.126302; 0.108722; 0.0918097; 0.0706249; 0.0750205; 0.0151629]
j := 2 .. n
T[1] := t[1]
T[j] := t[j] + T[j - 1]
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P[i] := e^(-K1sw*(E01 - i + 1)*t[i]^2/2)
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f[i] := -K1sw*(E01 - i + 1)*t[i]*e^(-K1sw*(E01 - i + 1)*t[i]^2/2)
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t[n + 1] := t[n] + rexp(1, 0.07)
λ[n + 1] := K1sw*|E01 - n|*t[n + 1]
m[n + 1] := 1/λ[n + 1]
m[n + 1] = [11.7993]
